*Heading
** Job name: HexQuadratic Model name: Model-1
** Generated by: Abaqus/CAE Student Edition 6.14-2
*Preprint, echo=NO, model=NO, history=NO, contact=NO
**
** PARTS
**
*Part, name=Part-1
*Node
      1,         -25.,         -20.,          50.
      2,         -25.,          -5.,          50.
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*Element, type=C3D20R
 1,  17,  18,  22,  21,   1,   2,   6,   5,  68,  67,  66,  65,  69,  70,  71,
     72,  74,  73,  75,  76
 2,  18,  19,  23,  22,   2,   3,   7,   6,  79,  78,  77,  67,  80,  81,  82,
     70,  73,  83,  84,  75
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*Nset, nset=Set-1, generate
   1,  208,    1
*Elset, elset=Set-1, generate
  1,  27,   1
** Section: Section-1
*Solid Section, elset=Set-1, material=Material-1
,
*End Part
**
**
** ASSEMBLY
**
*Assembly, name=Assembly
**
*Instance, name=Part-1-1, part=Part-1
*End Instance
**
*End Assembly
**
** MATERIALS
**
*Material, name=Material-1
*Elastic
1.,0.
** ----------------------------------------------------------------
**
** STEP: Step-1
**
*Step, name=Step-1, nlgeom=NO
*Static
1., 1., 1e-05, 1.
**
** OUTPUT REQUESTS
**
*Restart, write, frequency=0
**
** FIELD OUTPUT: F-Output-1
**
*Output, field, variable=PRESELECT
**
** HISTORY OUTPUT: H-Output-1
**
*Output, history, variable=PRESELECT
*End Step
